import math
import Sofa

g_needleLength=0.100 #(m)
g_needleNumberOfElems=20 #(# of edges)
g_needleBaseOffset=[0.04,0.04,0.02]
g_needleBaseOrientation=[0, 0.706825, 0, 0.707388]
g_needleDirection=[0.000796202173, 0, -0.999999683]
g_needleRadius = 0.001 #(m)
g_needleMechanicalParameters = {
    "radius":g_needleRadius,
    "youngModulus":2e11,
    "poissonRatio":0.3
}
g_needleDensity = 7850 #(kg/m^3, steel)
g_needleTotalMass = g_needleDensity * math.pi * g_needleRadius**2 * g_needleLength

g_gelRegularGridParameters = {
    "n":[8, 8, 8],
    "min":[-0.125, -0.125, -0.350],
    "max":[0.125, 0.125, -0.100]
} #Again all in mm
g_gelMechanicalParameters = {
    "youngModulus":1e4,
    "poissonRatio":0.3,
    "method":"large"
}
g_gelDensity = 1000 #(kg/m^3, soft tissue)
g_cubeColor=[0.8, 0.34, 0.34, 0.3]
g_gelFixedBoxROI=[-0.130, -0.130, -0.360, 0.130, 0.130, -0.300 ]


# Function called when the scene graph is being created
def createScene(root):
    root.gravity=[0,0,0]
    root.dt = 0.01

    root.addObject("RequiredPlugin",pluginName=['Sofa.Component.AnimationLoop',
                                                'Sofa.Component.Constraint.Lagrangian.Solver',
                                                'Sofa.Component.IntegrationScheme.Backward',
                                                'Sofa.Component.Visual',
                                                'Sofa.Component.Constraint.Lagrangian.Correction',
                                                'Sofa.Component.Constraint.Lagrangian.Model',
                                                'Sofa.Component.LinearSolver.Direct',
                                                'Sofa.Component.Mapping.Linear',
                                                'Sofa.Component.Mass',
                                                'Sofa.Component.SolidMechanics.FEM.Elastic',
                                                'Sofa.Component.StateContainer',
                                                'Sofa.Component.Topology.Container.Dynamic',
                                                'Sofa.Component.Topology.Mapping',
                                                'Sofa.Component.Mapping.NonLinear',
                                                'Sofa.Component.Topology.Container.Grid',
                                                'Sofa.Component.Constraint.Projective',
                                                'Sofa.Component.SolidMechanics.Spring',
                                                'Sofa.GL.Component.Rendering3D',
                                                'Sofa.GUI.Component',
                                                'Sofa.Component.Engine.Select',
                                                'Sofa.Component.Playback',
                                                'MultiThreading',
                                                'CollisionAlgorithm',
                                                'ConstraintGeometry'
                                                ])


    root.addObject("ConstraintAttachButtonSetting")
    root.addObject("VisualStyle", displayFlags="showVisualModels hideBehaviorModels showCollisionModels hideMappings hideForceFields showWireframe showInteractionForceFields" )
    root.addObject("FreeMotionAnimationLoop")
    root.addObject("BlockGaussSeidelConstraintSolver", tolerance=0.00001, maxIt=5000, printLog=False, computeConstraintForces=True)
    root.addObject("CollisionLoop")

    needleBaseMaster = root.addChild("NeedleBaseMaster")
    needleBaseMaster.addObject("MechanicalObject", name="mstate_baseMaster", template="Rigid3d", showObjectScale=0.002, showObject=True, drawMode=1
        , position="@reader.position")
    #    , position=[0.04, 0.04, 0, 0, 0, 0, 1])
    #needleBaseMaster.addObject("LinearMovementProjectiveConstraint",indices=[0],
    #    keyTimes=[
    #        0, 0.04, 0.25, 0.3, 0.35, 0.55
    #        ,0.6, 0.65, 0.85, 0.95, 1.05, 1.15
    #    ],
    #    movements=[
    #        [0.04, 0.04,  0, 0, 0, 0],
    #        [0.04, 0.04,  0.02, 0, 3.14/2, 0],
    #        [0.04, 0.04, -0.07, 0, 3.14/2, 0],
    #        [0.05, 0.04, -0.07, 0, 3.14/2 + 3.14/16, 0],
    #        [0.04, 0.04, -0.07, 0, 3.14/2, 0],
    #        [0.04, 0.04,  0.005,0, 3.14/2, 0],
    #        # Change to insertion at an angle
    #        [0.06, 0.04,  0.005, 0, 3.14/2, 0],
    #        [0.06, 0.04,  0.005, 0, 3.14/2 + 3.14/8, 0],
    #        [0.030866, 0.04, -0.04119, 0, 3.14/2 + 3.14/8, 0],
    #        [0.030866, 0.04, -0.04119, 0, 3.14/2, 0],
    #        [0.030866, 0.04, -0.04119, 0, 3.14/2 + 3.14/8, 0],
    #        [0.06, 0.04, 0.005, 0, 3.14/2 + 3.14/8, 0]
    #    ]
    #    ,relativeMovements=False
    #)
    #needleBaseMaster.addObject("WriteState", name="writer", filename="RecordState/NeedleInsertionCycles.txt"
    #    , period=0.01, writeX=True, writeV=True, time=0)
    needleBaseMaster.addObject("ReadState", name="reader", filename="RecordState/NeedleInsertionCycles.txt")


    needle = root.addChild("Needle")
    needle.addObject("EulerImplicitIntegrationScheme")
    needle.addObject("EigenSparseLU", name="LinearSolver", template="CompressedRowSparseMatrixd")
    needle.addObject("EdgeSetTopologyContainer", name="Container", position=[[g_needleBaseOffset[k] + i * g_needleLength/g_needleNumberOfElems * g_needleDirection[k] for k in range(3)] for i in range(g_needleNumberOfElems + 1)]
                                                                 , edges=[[i, i+1] for i in range(g_needleNumberOfElems)])

    needle.addObject("EdgeSetTopologyModifier", name="modifier")
    needle.addObject("PointSetTopologyModifier", name="modifier2")

    needle.addObject("MechanicalObject", name="mstate", template="Rigid3d", position=[[g_needleBaseOffset[k] + i * g_needleLength/g_needleNumberOfElems * g_needleDirection[k] for k in range(3)] + g_needleBaseOrientation for i in range(g_needleNumberOfElems + 1)], showObjectScale=0.0002, showObject=True, drawMode=1)

    # Per-unit-mass inertia of a cylindrical beam segment; the RigidMass default (identity) is ~1e5 too large
    segmentLength = g_needleLength / g_needleNumberOfElems
    axialInertia = g_needleRadius**2 / 2
    bendingInertia = g_needleRadius**2 / 4 + segmentLength**2 / 12
    nodeMass = g_needleTotalMass / (g_needleNumberOfElems + 1)
    Ixx, Iyy, Izz = axialInertia, bendingInertia, bendingInertia
    needle.addObject("UniformMass", vertexMass=f"{nodeMass} 1 {Ixx} 0 0 0 {Iyy} 0 0 0 {Izz}")
    needle.addObject("BeamFEMForceField", name="FEM", **g_needleMechanicalParameters)
    needle.addObject("LinearSolverConstraintCorrection", printLog=False, linearSolver="@LinearSolver")

    needleBase = needle.addChild("needleBase")
    needleBase.addObject("PointSetTopologyContainer", name="Container_base", position=[0, 0, 0])
    needleBase.addObject("MechanicalObject",name="mstate_base", template="Rigid3d",)
    needleBase.addObject("RestShapeSpringsForceField",points=[0],stiffness=1e9, angularStiffness=1e11,external_points=[0],external_rest_shape="@/NeedleBaseMaster/mstate_baseMaster")

    needleBase.addObject("SubsetMapping", indices="0")

    needleBodyCollision = needle.addChild("bodyCollision")
    needleBodyCollision.addObject("EdgeSetTopologyContainer", name="Container_body", src="@../Container")
    needleBodyCollision.addObject("MechanicalObject",name="mstate_body", template="Vec3d",)
    needleBodyCollision.addObject("EdgeGeometry",name="geom_body",mstate="@mstate_body", topology="@Container_body")
    needleBodyCollision.addObject("EdgeNormalHandler", name="NeedleBeams", geometry="@geom_body")

    needleBodyCollision.addObject("IdentityMapping")


    needleTipCollision = needle.addChild("tipCollision")
    needleTipCollision.addObject("MechanicalObject",name="mstate_tip",position=[g_needleBaseOffset[k] + g_needleLength * g_needleDirection[k] for k in range(3)],template="Vec3d",)
    needleTipCollision.addObject("PointGeometry",name="geom_tip",mstate="@mstate_tip")
    needleTipCollision.addObject("RigidMapping",globalToLocalCoords=True,index=g_needleNumberOfElems)


    needleVisual = needle.addChild("visual")
    needleVisual.addObject("QuadSetTopologyContainer", name="Container_visu")
    needleVisual.addObject("QuadSetTopologyModifier", name="Modifier")
    needleVisual.addObject("Edge2QuadTopologicalMapping", nbPointsOnEachCircle=8, radius=g_needleRadius, input="@../Container", output="@Container_visu")

    needleVisual.addObject("MechanicalObject", name="mstate_visu", showObjectScale=0.0002, showObject=True, drawMode=1)

    needleVisual.addObject("TubularMapping", nbPointsOnEachCircle=8, radius=g_needleRadius, input="@../mstate", output="@mstate_visu")

    needleOGL = needleVisual.addChild("OGL")
    needleOGL.addObject("OglModel", position="@../Container_visu.position",
                           vertices="@../Container_visu.position",
                           quads="@../Container_visu.quads",
                           color=[0.4, 0.34, 0.34],
                           material="texture Ambient 1 0.4 0.34 0.34 1.0 Diffuse 0 0.4 0.34 0.34 1.0 Specular 1 0.4 0.34 0.34 0.1 Emissive 1 0.5 0.54 0.54 .01 Shininess 1 20",
                           name="visualOgl")
    needleOGL.addObject("IdentityMapping")


    gelTopo = root.addChild("GelGridTopo")
    gelTopo.addObject("RegularGridTopology", name="HexaTop", **g_gelRegularGridParameters)


    volume = root.addChild("Volume")
    volume.addObject("EulerImplicitIntegrationScheme")
    volume.addObject("EigenSimplicialLDLT", name="LinearSolver", template='CompressedRowSparseMatrixMat3x3d')
    volume.addObject("TetrahedronSetTopologyContainer", name="TetraContainer", position="@../GelGridTopo/HexaTop.position")
    volume.addObject("TetrahedronSetTopologyModifier", name="TetraModifier")
    volume.addObject("Hexa2TetraTopologicalMapping", input="@../GelGridTopo/HexaTop", output="@TetraContainer", swapping=False)

    volume.addObject("MechanicalObject", name="mstate_gel", template="Vec3d")
    volume.addObject("TetrahedronGeometry", name="geom_tetra", mstate="@mstate_gel", topology="@TetraContainer", draw=False)
    volume.addObject("PhongTriangleNormalHandler", name="InternalTriangles", geometry="@geom_tetra")
    volume.addObject("FastTetrahedralCorotationalForceField", name="FF",**g_gelMechanicalParameters)
    volume.addObject("MeshMatrixMass", name="Mass", massDensity=g_gelDensity)

    volume.addObject("BoxROI",name="BoxROI",box=g_gelFixedBoxROI)
    volume.addObject("RestShapeSpringsForceField", stiffness=1e3, points="@BoxROI.indices")

    volume.addObject("LinearSolverConstraintCorrection", printLog=False, linearSolver="@LinearSolver")

    volumeCollision = volume.addChild("collision")
    volumeCollision.addObject("TriangleSetTopologyContainer", name="TriContainer")
    volumeCollision.addObject("TriangleSetTopologyModifier", name="TriModifier")
    volumeCollision.addObject("Tetra2TriangleTopologicalMapping", name="mapping", input="@../TetraContainer", output="@TriContainer", flipNormals=False)
    volumeCollision.addObject("MechanicalObject", name="mstate_gelColi",position="@../TetraContainer.position")
    volumeCollision.addObject("TriangleGeometry", name="geom_tri", mstate="@mstate_gelColi", topology="@TriContainer",draw=False)
    volumeCollision.addObject("PhongTriangleNormalHandler", name="SurfaceTriangles", geometry="@geom_tri")
    volumeCollision.addObject("AABBBroadPhase", name="AABBTriangles", thread=1, nbox=[2,2,3], method=2)

    volumeCollision.addObject("IdentityMapping", name="identityMappingToCollision", input="@../mstate_gel", output="@mstate_gelColi", isMechanical=True)

    volumeVisu = volumeCollision.addChild("visu")
    volumeVisu.addObject("OglModel", position="@../TriContainer.position",
                        vertices="@../TriContainer.position",
                        triangles="@../TriContainer.triangles",
                        color=g_cubeColor,name="volume_visu",template="Vec3d")
    volumeVisu.addObject("IdentityMapping")

    volumeVisuWire = volume.addChild("visu_wire")
    volumeVisuWire.addObject("OglModel", position="@../TetraContainer.position",
                        vertices="@../TetraContainer.position",
                        triangles="@../TetraContainer.triangles",
                        color=[1, 0, 1, 1],name="volume_visu",template="Vec3d")
    volumeVisuWire.addObject("IdentityMapping")


    root.addObject("InsertionAlgorithm", name="InsertionAlgo",
        tipGeom="@Needle/tipCollision/geom_tip",
        surfGeom="@Volume/collision/geom_tri",
        shaftGeom="@Needle/bodyCollision/geom_body",
        volGeom="@Volume/geom_tetra",
        punctureForceThreshold=5,
        tipDistThreshold=0.003,
        drawcollision=True,
        drawPointsScale=0.0001
    )
    root.addObject("DistanceFilter",algo="@InsertionAlgo",distance=0.01)
    root.addObject("SecondDirection",name="punctureDirection",handler="@Volume/collision/SurfaceTriangles")
    root.addObject("ConstraintUnilateral",input="@InsertionAlgo.collisionOutput",directions="@punctureDirection", contactDistance=0,draw_scale=0.001, mu=0.001)

    root.addObject("FirstDirection",name="bindDirection", handler="@Needle/bodyCollision/NeedleBeams")
    root.addObject("ConstraintInsertion",input="@InsertionAlgo.insertionOutput", directions="@bindDirection",draw_scale=0.002, frictionCoeff=0.00)#23)
